*NODE, NSET=nodes
1, 1.100000, 1.000000, 0.000000
2, 1.529289, 0.970711, 0.000000
3, 1.941421, 0.600000, 0.000000
4, 3.450000, 0.700000, 0.000000
5, 3.450000, -0.100000, 0.000000
6, 3.500000, -0.100000, 0.000000
7, 3.500000, 0.300000, 0.000000
8, 3.500000, 0.700000, 0.000000
9, 3.500000, 1.100000, 0.000000
10, 3.450000, 1.100000, 0.000000
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
*ELEMENT, TYPE=CPS8, ELSET=CPS8
191, 721, 722, 725, 724, 740, 741, 742, 743
192, 722, 158, 159, 725, 744, 166, 745, 741
193, 725, 159, 160, 723, 745, 167, 746, 747
194, 724, 725, 723, 720, 742, 747, 748, 749
195, 721, 724, 728, 727, 743, 750, 751, 752
196, 724, 720, 726, 728, 749, 753, 754, 750
197, 728, 726, 178, 179, 754, 755, 186, 756
198, 727, 728, 179, 180, 751, 756, 187, 757
199, 156, 729, 731, 155, 758, 759, 760, 163
200, 729, 719, 730, 731, 761, 762, 763, 759
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*ELEMENT, TYPE=CAX8, ELSET=CAX8
1, 1, 290, 293, 135, 389, 390, 391, 139
2, 290, 253, 291, 293, 392, 393, 394, 390
3, 293, 291, 266, 292, 394, 395, 396, 397
4, 135, 293, 292, 134, 391, 397, 398, 138
5, 262, 294, 298, 297, 399, 400, 401, 402
6, 294, 265, 295, 298, 403, 404, 405, 400
7, 298, 295, 264, 296, 405, 406, 407, 408
8, 297, 298, 296, 254, 401, 408, 409, 410
9, 259, 299, 302, 301, 411, 412, 413, 414
10, 299, 256, 300, 302, 415, 416, 417, 412
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*ELSET,ELSET=EALL
191, 192, 193, 194, 195, 196,
197, 198, 199, 200, 201, 202,
203, 204, 205, 206, 207, 208,
209, 210, 211, 212, 213, 214,
215, 216, 217, 218, 219, 220,
221, 222, 1, 2, 3, 4,
5, 6, 7, 8, 9, 10,
11, 12, 13, 14, 15, 16,
17, 18, 19, 20, 21, 22,
23, 24, 25, 26, 27, 28,
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
*ELSET,ELSET=PART0_elements
1, 2, 3, 4, 5, 6,
7, 8, 9, 10, 11, 12,
13, 14, 15, 16, 17, 18,
19, 20, 21, 22, 23, 24,
25, 26, 27, 28, 29, 30,
31, 32, 33, 34, 35, 36,
37, 38, 39, 40, 41, 42,
43, 44, 45, 46, 47, 48,
49, 50, 51, 52, 53, 54,
55, 56, 57, 58, 59, 60,
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*NSET,NSET=L4_nodes
5, 6, 70, 71, 69, 73,
72, 74, 75
*NSET,NSET=A1_nodes
7, 15, 8, 14, 177, 160,
178, 159, 170, 172, 171, 158,
179, 181, 180, 161, 183, 155,
157, 182, 156, 84, 83, 719,
720, 721, 85, 739, 727, 730,
732, 733, 728, 731, 737, 729,
736, 735, 738, 734, 167, 184,
185, 188, 176, 190, 175, 166,
173, 189, 191, 165, 168, 169,
174, 186, 187, 791, 744, 749,
743, 750, 740, 748, 752, 756,
760, 745, 754, 761, 765, 741,
742, 746, 747, 762, 758, 764,
766, 767, 757, 753, 751, 755,
759, 763, 790, 774, 785, 768,
784, 776, 781, 772, 780, 769,
775, 777, 782, 773, 771, 779,
783, 787, 770, 778, 786, 788,
789, 89, 88, 87, 86, 723,
722, 724, 725, 726, 162, 163,
164

*MATERIAL,NAME=nickel_alloy
*ELASTIC
208000000000,0.3
*DENSITY
8220
*SOLID SECTION,ELSET=PART0_elements,MATERIAL=nickel_alloy
*NODAL THICKNESS
A1_nodes, 0.100000
*STEP
*STATIC
** Rotation force on component: PART0_elements
** Speed = 10000 rotations/minute
*DLOAD
PART0_elements,CENTRIF,1096622.711232,0.,0.,0.,0.,1.,0.
*BOUNDARY
L4_nodes,2,2,0.000000
*EL FILE
E,S
*NODE FILE
RF,U
*EL PRINT,ELSET=EALL
S
*END STEP
