*NODE, NSET=nodes
1, 0.000000, 0.000000, 0.000000
2, 2.438400, 0.000000, 0.000000
3, 6.705600, 3.657600, 0.000000
4, 33.223200, 4.120466, 0.000000
5, 35.052000, 4.152388, 0.000000
6, 35.052000, 8.419588, 0.000000
8, 6.705600, 22.250400, 0.000000
10, 4.267200, 29.870400, 0.000000
11, 0.609600, 33.528000, 0.000000
12, 0.000000, 33.528000, 0.000000
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
*ELEMENT, TYPE=CPE8, ELSET=EAll
1, 4, 145, 147, 33, 196, 197, 198, 41
2, 145, 57, 58, 147, 199, 69, 200, 197
3, 147, 58, 59, 146, 200, 70, 201, 202
4, 33, 147, 146, 32, 198, 202, 203, 40
5, 130, 148, 150, 149, 204, 205, 206, 207
6, 148, 123, 134, 150, 208, 209, 210, 205
7, 150, 134, 65, 133, 210, 211, 212, 213
8, 149, 150, 133, 124, 206, 213, 214, 215
9, 124, 132, 152, 139, 216, 217, 218, 219
10, 132, 8, 79, 152, 220, 82, 221, 217
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
*ELSET,ELSET=PART0_elements
1, 2, 3, 4, 5, 6,
7, 8, 9, 10, 11, 12,
13, 14, 15, 16, 17, 18,
19, 20, 21, 22, 23, 24,
25, 26, 27, 28, 29, 30,
31, 32, 33, 34, 35, 36,
37, 38, 39, 40, 41, 42,
43, 44, 45, 46, 47, 48,
49, 50, 51, 52, 53, 54,
55, 56, 57, 58, 59, 60,
61, 62, 63, 64, 65, 66,
67, 68, 69, 70, 71, 72,
73, 74, 75, 76, 77, 78,
79, 80, 81, 82, 83, 84,
85, 86, 87, 88, 89, 90,
91, 92, 93, 94, 95, 96,
97, 98, 99, 100, 101, 102
*NSET,NSET=PART0_nodes
57, 43, 59, 14, 61, 63,
65, 30, 32, 50, 21, 28,
11, 2, 4, 3, 1, 6,
10, 8, 12, 5, 62, 66,
20, 124, 88, 93, 95, 33,
130, 80, 109, 94, 15, 123,
127, 87, 29, 49, 58, 60,
125, 107, 126, 131, 31, 64,
81, 105, 51, 79, 128, 101,
129, 22, 86, 13, 56, 42,
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*NSET,NSET=L9_nodes
1, 12, 109, 107, 105, 101,
103, 111, 112, 113, 119, 121,
122, 117, 115, 116, 120, 114,
118, 100, 108, 102, 104, 106,
110

*MATERIAL,NAME=concrete
*ELASTIC
30000000000,0.2
*DENSITY
2300
*SOLID SECTION,ELSET=PART0_elements,MATERIAL=concrete
*NODAL THICKNESS
PART0_nodes, 176.784000
*STEP
*STATIC
** Pressure on component: L3-L8_faces
*DLOAD
92,P1,101325.000000
96,P3,101325.000000
91,P1,101325.000000
95,P2,101325.000000
92,P2,101325.000000
71,P2,101325.000000
93,P3,101325.000000
70,P2,101325.000000
72,P3,101325.000000
73,P1,101325.000000
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** Fluid pressure on component: L0-L2_faces
*DLOAD
64,P3,406313.976000
*DLOAD
68,P4,424254.504000
*DLOAD
63,P3,412294.152000
*DLOAD
65,P4,418274.328000
*DLOAD
60,P3,366695.310000
*DLOAD
64,P4,398091.234000
*DLOAD
59,P3,377160.618000
*DLOAD
61,P4,387625.926000
*DLOAD
24,P4,215135.224500
*DLOAD
1,P4,117583.603500
*DLOAD
27,P3,280169.638500
*DLOAD
28,P3,247652.431500
*DLOAD
4,P4,150100.810500
*DLOAD
37,P1,345204.052500
*DLOAD
21,P4,182618.017500
*DLOAD
38,P1,312686.845500
** Gravity on component: PART0_elements
*DLOAD
PART0_elements,GRAV,9.810000,-1.,0.,0.
*BOUNDARY
L9_nodes,1,1,0.000000
*BOUNDARY
L9_nodes,2,2,0.000000
*EL FILE
E,S
*NODE FILE
RF,U
*EL PRINT,ELSET=EALL
S
*END STEP
