*NODE, NSET=nodes
1, 4.444444, -2.222222, 0.000000
2, 4.444444, 2.222222, 0.000000
3, -4.444444, 2.222222, 0.000000
4, -4.444444, -2.222222, 0.000000
5, 0.000000, 1.000000, 0.000000
7, 1.000000, 0.000000, 0.000000
8, 0.000000, -1.000000, 0.000000
9, -1.000000, 0.000000, 0.000000
10, -0.000000, 2.222222, 0.000000
11, 4.444444, 0.000000, 0.000000
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
*ELEMENT, TYPE=CPS8, ELSET=EAll
1, 240, 248, 252, 251, 293, 294, 295, 296
2, 248, 244, 249, 252, 297, 298, 299, 294
3, 252, 249, 245, 250, 299, 300, 301, 302
4, 251, 252, 250, 238, 295, 302, 303, 304
5, 246, 253, 257, 256, 305, 306, 307, 308
6, 253, 98, 254, 257, 309, 310, 311, 306
7, 257, 254, 241, 255, 311, 312, 313, 314
8, 256, 257, 255, 247, 307, 314, 315, 316
9, 164, 258, 260, 163, 317, 318, 319, 171
10, 258, 245, 259, 260, 320, 321, 322, 318
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
*NSET,NSET=P6-P8_nodes
7, 9
*NSET,NSET=P4-P7_nodes
5, 8
*ELSET,ELSET=PART0_elements
1, 2, 3, 4, 5, 6,
7, 8, 9, 10, 11, 12,
13, 14, 15, 16, 17, 18,
19, 20, 21, 22, 23, 24,
25, 26, 27, 28, 29, 30,
31, 32, 33, 34, 35, 36,
37, 38, 39, 40, 41, 42,
43, 44, 45, 46, 47, 48,
49, 50, 51, 52, 53, 54,
55, 56, 57, 58, 59, 60,
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*NSET,NSET=PART0_nodes
32, 36, 19, 38, 55, 17,
15, 57, 68, 34, 53, 30,
7, 13, 2, 8, 12, 1,
4, 11, 3, 5, 9, 10,
164, 228, 226, 607, 608, 72,
123, 151, 74, 98, 125, 142,
184, 609, 186, 187, 105, 127,
188, 201, 91, 203, 208, 76,
209, 70, 153, 149, 112, 166,
183, 119, 121, 179, 185, 181,
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
*MATERIAL,NAME=steel
*ELASTIC
210000000000,0.3
*DENSITY
7800
*SOLID SECTION,ELSET=PART0_elements,MATERIAL=steel
*NODAL THICKNESS
PART0_nodes, 0.100000
*STEP
*STATIC
** Pressure on component: L0-L10_faces
*DLOAD
58,P2,-1000.000000
59,P2,-1000.000000
11,P3,-1000.000000
67,P3,-1000.000000
12,P3,-1000.000000
68,P3,-1000.000000
69,P1,-1000.000000
70,P1,-1000.000000
78,P1,-1000.000000
73,P1,-1000.000000
137,P2,-1000.000000
74,P1,-1000.000000
138,P3,-1000.000000
77,P1,-1000.000000
133,P1,-1000.000000
134,P1,-1000.000000
** Pressure on component: L2-L14_faces
*DLOAD
232,P3,-1000.000000
275,P3,-1000.000000
276,P3,-1000.000000
253,P1,-1000.000000
254,P1,-1000.000000
270,P2,-1000.000000
271,P2,-1000.000000
231,P3,-1000.000000
208,P3,-1000.000000
145,P1,-1000.000000
146,P1,-1000.000000
210,P2,-1000.000000
211,P2,-1000.000000
171,P3,-1000.000000
172,P3,-1000.000000
207,P3,-1000.000000
*BOUNDARY
P6-P8_nodes,2,2,0.000000
*BOUNDARY
P4-P7_nodes,1,1,0.000000
*EL FILE
E,S
*NODE FILE
RF,U
*EL PRINT,ELSET=EALL
S
*END STEP
